# Кривые Безье
Bezier(P, nT) :=
    X ← P[:, 0]
    Y ← P[:, 1]
    N ← rows(X)
    Δt ← 1/nT
    X_Bezier[0] ← X[0]
    Y_Bezier[0] ← Y[0]
    for k ∈ 1 .. nT
        t ← k*Δt
        for m ∈ 0 .. N - 1
            RX[m] ← X[m]
            RY[m] ← Y[m]
        for j ∈ N - 1 .. 1
            for i ∈ 0 .. j - 1
                RX[i] ← RX[i] + t*(RX[i + 1] - RX[i])
                RY[i] ← RY[i] + t*(RY[i + 1] - RY[i])
        X_Bezier[k] ← RX[0]
        Y_Bezier[k] ← RY[0]
    Bezier_out ← augment(X_Bezier, Y_Bezier)
    Bezier_out
nT := 30
P := [1, 2; 3, 5; 5, 1; 7, 4]
B := Bezier(P, nT)
PointsX := P[:, 0]
PointsY := P[:, 1]
BezierX := B[:, 0]
BezierY := B[:, 1]
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# Полином Лагранжа
Lagr(t, P) :=
    X ← P[:, 0]
    Y ← P[:, 1]
    lagr ← 0
    for i ∈ 0 .. last(X)
        basics ← 1
        for j ∈ 0 .. last(X)
            continue if j == i
            basics ← basics*((t - X[j])/(X[i] - X[j]))
        lagr ← lagr + Y[i]*basics
    lagr
P := [2, 2; 5, 8; 8, 2]
X := P[:, 0]
Y := P[:, 1]
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